# Исходные данные для расчета([3],с.113)
# Число твэлов в ТВС:
n_тв := 126
# Тепловая мощность:
N_т := 1.375*10^9  # Вт
# Тип теплоносителя:
# H_2O
# Число ТВС в активной зоне:
n_ТВС := 349
# Давление теплоносителя:
p := 12.26*10^6  # Па
t_вх := 270  # °C
T_вх := t_вх + 273.15 = 543.15  # К
# Температуры входа и выхода теплоносителя([3],с.113):
# 1. Александров А. А., Григорьев Б. А. "Таблицы теплофизических свойств воды и водяного пара", Москва, Издательство МЭИ, 1999, 168 с.
t_вых := 300  # °C
T_вых := t_вых + 273.15 = 573.15  # К
# Средняя объемная плотность энерговыделения:
q_v.ср. := 0.084*10^9  # Вт/м^3  # 2.Дементьев
# Коэффициенты неравномерности энерговыделения:
K_zmax := 1.4  # 3.Денисов,Драгунов
K_rmax := 1.5  # 4. Емельянов И. Я., Михан В. И., Солонин В. И. "Конструирование ядерных реакторов", Москва, "Энергоатомиздат", 1982, 400 с.
UO_2
# Тип твэла,схема установки твэлов в АЗ:
# Цилиндрический, Δ
# Топливо:
# 5. Кириллов П. Л., Юрьев Ю. С., Бобков В. П. "Справочник по теплогидравлическим расчетам", Москва, "Энергоатомиздат", 1990, 360 с.
# 1.Подготовка данных для поверочного теплогидравлического расчета:
# 6.Кириллов - теплообмен
# 1.1.Определение теплофизических свойств материалов системы охлаждения активной зоны:
# 7.Идельчик - справочник по гидравлическим сопротивлениям
# а)Определение теплопроводности топлива по аппроксимационной формуле([2],с.165):
# 8.Метода Ярославы
t_UO2доп := 2800  # °C
T_UO2доп := 2800 + 273.15 = 3073.15  # K  # - температура плавления UO_2
# 9.Нормы расчета на прочность
λ_т == 5500/(560 + T_топл) + 0.942*10^-10*T_топл^3  # Вт/(м*К)  # Ттопл -  температура топливного сердечника
# 10.Чиркин
# б)Определение теплопроводности материала оболочки ТВЭЛа:
# В качестве конструкционного материала оболочки ТВЭЛа используется циркониевый сплав с 1% Nb.
t_ср := (t_вх + t_вых)/2 = 285  # °C
T_ср := (T_вх + T_вых)/2 = 558.15  # K
# Теплопроводность циркония определяем по температуре T0 = Tср + 20 К = 578 К ([2],c.320):
λ_об := 20.6  # Вт/(м*К)
# в)Определение теплофизических свойств теплоносителя при cредней температуре([1],с.303):
ρ_H2O := 750.3  # кг/м^3
i_H2O := 1260  # кДж/кг
μ_H2O := 9.337*10^-5  # Па*с
Pr_H2O := 0.8424
c_pH2O := 5231  # Дж/(кг*К)
ν_H2O := μ_H2O/ρ_H2O = 1.24444e-7  # м^2/с
λ_H2O := 0.578  # Вт/(м*К)
# г)Определение теплопроводности гелия, заполняющего зазор между топливным сердечником и оболочкой твэла при давлении 2 МПа и температуре, равной внутренней температуре оболочки твэла([2],c.314):
λ_He := 0.26  # Вт/(м*К)
# 1.2.Определение диаметра активной зоны:
V_АЗ := N_т/q_v.ср. = 16.369  # м^3
# с другой стороны
V_АЗ == πD_АЗ^2*H_АЗ/4
# Высота активной зоны:
H_АЗ := 2.5  # м
# ,тогда
D_АЗ := sqrt(4*V_АЗ/(H_АЗ*π)) = 2.88733  # м
R_АЗ := D_АЗ/2 = 1.44367  # м
# 1.3.Вычисление экстраполированных добавок по высоте и по радиусу:
_
integral(K_zmax*sin(π*(z + Δ_z)/(H_АЗ + 2*Δ_z)), z = 0 .. H_АЗ) == H_АЗ
# Kz =1, =>
root(H_АЗ - integral(K_zmax*sin(π*(z + Δ_z)/(H_АЗ + 2*Δ_z)), z = 0 .. H_АЗ), Δ_z, 0, 100) = 0.180503
Δ_z := 0.181  # м
_
1/(π*R_АЗ^2)*integral(K_rmax*J0(2.405*r/(R_АЗ + Δ_r))*2*π*r, r = 0 .. R_АЗ) == 1
# Kr =
root(π*R_АЗ^2 - integral(K_rmax*J0(2.405*r/(R_АЗ + Δ_r))*(2*π*r), r = 0 .. R_АЗ), Δ_r, 0, 100) = 0.552689
Δ_r := 0.553  # м
K_z(z) := K_zmax*sin(π*(z + Δ_z)/(H_АЗ + 2*Δ_z))
K_r(r) := K_rmax*J0(2.405*r/(R_АЗ + Δ_r))
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# рис. 5 | рис. 6
# 1.4.Проверка вычисления Δ_z и Δ_r и построение графиков K_z(z) и K_r(r) ([4],с.303)  :
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ε_r := Δ_r/R_АЗ = 0.383053
K_rmax = 1.5
ε_z := 2*Δ_z/H_АЗ = 0.1448
K_zmax = 1.4
# рис. 7
# 1.5.Определение общего расхода теплоносителя через активную зону и ТВС:
G_тепл := N_т/(c_pH2O*(T_вых - T_вх)) = 8761.87  # кг/с
G_ТВС := G_тепл/n_ТВС = 25.1056  # кг/с  # - средний расход через ТВС
# 1.6.Геометрические характеристики  твэлов:
d_тв := 9.1*10^-3  # м - диаметр твэла
δ_об := 0.65*10^-3  # м - толщина оболочки твэла
s := 12.2*10^-3  # м - шаг между твэлами
x := s/d_тв = 1.34066  # - относительный шаг между твэлами
d_отв := 1.2*10^-3  # м - диаметр центрального отверстия в сердечнике
δ_заз := 0.1*10^-3  # м - величина зазора между топливным сердечником и оболочкой в начале кампании
d_т := d_тв - 2*(δ_об + δ_заз) = 0.0076  # м - диаметр топливного сердечника
S_тв := π*d_тв^2/4 = 6.50388e-5  # м^2  # - площадь твэла в поперечном сечении
П_тв := π*d_тв = 0.0285885  # м - периметр твэла
# 2.Гидравлическое профилирование системы охлаждения активной зоны:
# Гидравлическое профилирование проводится с целью обеспечить равный подогрев теплоно- сителя на разных участках активной зоны. Проводить профилирование будем путем установки до-  полнительного сопротивления(дроссельных шайб) на входе в ТВС. Активная зона ВВЭР-440 имеет в продольном сечении 19 ТВС, следовательно ее можно разбить на 5 зон профилирования(1-я зона - центральная ТВС)
G_тепл(r) := G_тепл*K_r(r)
G_тепл(r) == G_тепл*K_r(r)
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# рис. 8
# Разобьем активную зону на 5 кольцевых зон:
R_1 := 5*D_АЗ/38 = 0.379912
R_2 := R_1 + 2*D_АЗ/19 = 0.683842
R_3 := R_2 + 2*D_АЗ/19 = 0.987772  # м
R_4 := R_3 + 2*D_АЗ/19 = 1.2917
R_5 := R_4 + D_АЗ/19 = 1.44367  # м
# Расход через активную зону после профилирования:
G_проф(r) :=
    G_тепл(0) if r < R_1
    G_тепл(R_1) if R_1 ≤ r < R_2
    G_тепл(R_2) if R_2 ≤ r < R_3
    G_тепл(R_3) if R_3 ≤ r < R_4
    G_тепл(R_4) if R_4 ≤ r < R_5
    0 if r > R_5
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# рис. 9
G_проф > G  # - в результате гидравлического профилирования имеем недогрев теплоносителя
# Так как поверочный теплогидравлический расчет будем проводить для наиболее энергонап- ряженной центральной ТВС, найдем расход теплоносителя для этой ТВС:
G_ТВСmax := G_ТВС*K_r(0) = 37.6585  # кг/с
# 3.Поверочный теплогидравлический расчет(метод изолированных ячеек):
# Суть метода изолированных ячеек состоит в том, что сечение тепловыделяющей сборки под- разделяется на элементарные каналы(ячейки), в пределах которых изменением параметров потока (скорости, температуры), можно пренебречь. Границы элементарных ячеек - линии, соединяющие центры стержней, либо линии нулевых касательных напряжений(линии максимальных скоростей). Для каждой ячейки записываются уравнения баланса массы, количества движения и энергии без учета теплового и гидродинамического взаимодействия на границах раздела ячеек(межканального взаимодействия). Для расчета средних скоростей в ячейках используют уравнение баланса коли- чества движения в них, замыкается полученная система уравнений уравнением неразрывности.
# 3.1.Расчет геометрических характеристик выбранных ячеек:
# Исходя из геометрии ТВС, выделим 4 типа ячеек:
# 1-й тип ячеек - 3 твэла(210 ячеек 1-го типа в ТВС):
# Площадь ячейки в поперечном сечении:
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d_труб := 12.2*10^-3
S_яч1 := 0.5*s^2*cos(π/6) = 6.44496e-5  # м^2
# Площадь проходного сечения ячейки:
S_ж1 := 0.5*s^2*cos(π/6) - π*d_тв^2/8 = 3.19302e-5  # м^2
# Смоченный периметр:
П_см1 := π*d_тв/2 = 0.0142942  # м
# Обогреваемый периметр:
П_об1 := П_см1 = 0.0142942  # м
# Гидравлический диаметр ячейки:
# рис. 10
d_г1 := 4*S_ж1/П_см1 = 0.00893512  # м
# Площадь, занимаемая топливом в поперечном сечении ячейки:
F_топл1 := π*d_т^2/8 = 2.26823e-5  # м^2
# 2-й тип ячеек - 2 твэла и центральный канал(6 ячеек 2-го типа в ТВС):
# Площадь ячейки в поперечном сечении:
S_яч2 := 0.5*s^2*cos(π/6) = 6.44496e-5  # м^2
# Площадь проходного сечения ячейки:
S_ж2 := 0.5*s^2*cos(π/6) - π*d_тв^2/12 - π*d_труб^2/24 = 2.32869e-5  # м^2
# Смоченный периметр:
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П_см2 := π*d_тв/3 + π*d_труб/6 = 0.0159174  # м
# Обогреваемый периметр:
П_об2 := π*d_тв/3 = 0.0095295  # м
# Гидравлический диаметр ячейки:
d_г2 := 4*S_ж2/П_см2 = 0.00585193  # м  # рис. 11
# Площадь, занимаемая топливом в поперечном сечении ячейки:
F_топл2 := π*d_т^2/12 = 1.51215e-5  # м^2
# 3-й тип ячеек - 2 твэла и участок чехла(36 ячеек 3-го типа в ТВС):
# Площадь ячейки в поперечном сечении:
S_яч3 := s*7.2*10^-3 = 8.784e-5  # м^2
# Площадь проходного сечения ячейки:
S_ж3 := s*7.2*10^-3 - π*d_тв^2/8 = 5.53206e-5
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м^2
# Смоченный периметр:
П_см3 := π*d_тв/2 + s = 0.0264942  # м
# Обогреваемый периметр:
П_об3 := π*d_тв/2 = 0.0142942  # м
# Гидравлический диаметр ячейки:
d_г3 := 4*S_ж3/П_см3 = 0.00835209  # м  # рис. 12
# Площадь, занимаемая топливом в поперечном сечении ячейки:
F_топл3 := π*d_т^2/8 = 2.26823e-5  # м^2
# 4-й тип ячеек - 1 твэл и участок чехла(6 ячеек 4-го типа в ТВС):
# Площадь ячейки в поперечном сечении:
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S_яч4 := π*(7.6*10^-3)^2/6 = 3.02431e-5  # м^2
# Площадь проходного сечения ячейки:
S_ж4 := (π*(7.6*10^-3)^2 - π*(d_тв/2)^2)/6 = 1.94033e-5  # м^2
# Смоченный периметр:
П_см4 := π*d_тв/6 + 4*10^-3 + π*(7.6*10^-3)/6 = 0.0127441  # м
# Обогреваемый периметр: | рис. 13
П_об4 := π*d_тв/6 = 0.00476475  # м
# Гидравлический диаметр ячейки:
d_г4 := 4*S_ж4/П_см4 = 0.00609012
w_3 := 1
# Площадь, занимаемая топливом в поперечном сечении ячейки:
F_топл4 := π*d_т^2/24 = 7.56077e-6  # м^2
w_1 := 1
w_2 := 1
w_4 := 1
# 3.2.Расчет скоростей в выбранных ячейках:
# Составим систему уравнений для нахождения скоростей в каждой ячейке:
Given
w_1/w_2 == 1.083*(d_г1/d_г2)^0.714
w_1/w_3 == 1.083*(d_г1/d_г3)^0.714
w_1/w_4 == 1.083*(d_г1/d_г4)^0.714
G_ТВСmax/ρ_H2O == 210*S_ж1*w_1 + 6*S_ж2*w_2 + 36*S_ж3*w_3 + 6*S_ж4*w_4
# Решив систему, получим:
w_1 := 5.813
w_2 := 3.967
w_3 := 5.115
w_4 := 4.082  # м/c
Find(w_1, w_2, w_3, w_4) = [5.81261; 3.96743; 5.11468; 4.08206]
# 3.3.Расчет температурных распределений по высоте активной зоны:
# Поверочный теплогидравлический расчет проводим для самой теплонапряженной - центральной ТВС.
# Распределение плотности теплового потока по длине ТВС:
q_Fср(z) == q_v.ср.*K_r(0)*K_z(z)*(210*S_яч1 + 6*S_яч2 + 36*S_яч3 + 6*S_яч1)/(n_тв*π*d_тв)
q_F1(z) := q_v.ср.*K_r(0)*K_z(z)*S_яч1/П_об1
q_F2(z) := q_v.ср.*K_r(0)*K_z(z)*S_яч2/П_об2
q_F2(H_АЗ/2)*П_об2 = 11368.9
q_F4(z) := q_v.ср.*K_r(0)*K_z(z)*S_яч4/П_об4
q_F3(z) := q_v.ср.*K_r(0)*K_z(z)*S_яч3/П_об3
# Расчет подогрева теплоносителя по длине ТВС:
ΔT(z) == integral(q_F(z), z = 0 .. z)*Поб/(ρ_H2O*w*S_ж*c_pH2O)
T_1(z) := T_вх + integral(q_F1(z), z = 0 .. z)*П_об1/(ρ_H2O*w_1*S_ж1*c_pH2O)
T_2(z) := T_вх + integral(q_F2(z), z = 0 .. z)*П_об2/(ρ_H2O*w_2*S_ж2*c_pH2O)
T_s(z) := 599
t_s(z) := T_s(z) - 273
T_3(z) := T_вх + integral(q_F3(z), z = 0 .. z)*П_об3/(ρ_H2O*w_3*S_ж3*c_pH2O)
T_4(z) := T_вх + integral(q_F4(z), z = 0 .. z)*П_об4/(ρ_H2O*w_4*S_ж4*c_pH2O)
t_1(z) := T_1(z) - 273
t_2(z) := T_2(z) - 273
t_3(z) := T_3(z) - 273
t_4(z) := T_4(z) - 273
i_вх := 1183
t_2(z) :=
    T_вх + integral(q_F2(z), z = 0 .. z)*П_об2/(ρ_H2O*w_2*S_ж2*c_pH2O) - 273 if T_2(z) < 599
    599 - 273 otherwise
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t_s(z) == 326  # °C
# - температура насыщения тепло- носителя при давлении 12.26 МПа
z_j := 0, 0.25 .. 2.5
c_p(z) := wspCPPT(12260000, T_вх + integral(q_F2(z), z = 0 .. z)*П_об2/(ρ_H2O*w_2*S_ж2*c_pH2O))
# рис. 14
t_1(z_j) = [270.15; 271.432; 273.661; 276.67; 280.235; 284.088; 287.94; 291.505; 294.514; 296.743; 298.025]
t_2(z_j) = [270.15; 272.726; 277.204; 283.251; 290.413; 298.154; 305.895; 313.057; 319.103; 323.582; 326]
t_3(z_j) = [270.15; 271.296; 273.289; 275.979; 279.166; 282.61; 286.055; 289.241; 291.932; 293.925; 295.071]
t_4(z_j) = [270.15; 271.56; 274.011; 277.32; 281.24; 285.477; 289.713; 293.633; 296.942; 299.394; 300.803]
# °C | °C | °C | °C
# Расчет наружной температуры оболочки твэла:
# Число Рейнольдса:
Re == w*d_г/ν_H2O
Re_1 := w_1*d_г1/ν_H2O = 417377
Re_2 := w_2*d_г2/ν_H2O = 186547
Re_3 := w_3*d_г3/ν_H2O = 343296
Re_4 := w_4*d_г4/ν_H2O = 199768
# Число Нуссельта вычислим по формуле для продольного обтекания пучка стержней с треугольной решеткой([5],c. 73):
Nu == A*Re^0.8*Pr_H2O^0.4
# где
A := 0.0165 + 0.02*(1 - 0.91*x^-2)*x^0.15 = 0.026818
Nu_1 := A*(Re_1^0.8*Pr_H2O^0.4) = 785.337
Nu_2 := A*(Re_2^0.8*Pr_H2O^0.4) = 412.349
Nu_3 := A*(Re_3^0.8*Pr_H2O^0.4) = 671.689
Nu_4 := A*(Re_4^0.8*Pr_H2O^0.4) = 435.566
# Коэффициент теплоотдачи от ТВЭЛа теплоносителю равен:
α == Nu*λ_H2O/d_г
α_1 := Nu_1*λ_H2O/d_г1 = 50802.3
α_2 := Nu_2*λ_H2O/d_г2 = 40728
α_3 := Nu_3*λ_H2O/d_г3 = 46483.7
α_4 := Nu_4*λ_H2O/d_г4 = 41338.7  # Вт/(м^2*К)
# Расчет разности между среднесмешанной температурой теплоносителя и наружной температурой стенки:
ΔT_f(z) == q_F(z)/α
T_f1(z) := T_1(z) + q_F1(z)/α_1
T_f2(z) := T_2(z) + q_F2(z)/α_2
T_f3(z) := T_3(z) + q_F3(z)/α_3
T_f4(z) := T_4(z) + q_F4(z)/α_4
t_Zr(z) := 352
t_f1(z) := T_f1(z) - 273
t_f2(z) := T_f2(z) - 273
t_f3(z) := T_f3(z) - 273
t_f4(z) := T_f4(z) - 273
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# Температура, при которой циркониевый сплав Э110 обладает хорошей корро- зионной стойкостью в воде([4],с.177):
t_Zr == 352  # °C
# Максимальные значения внешней температуры оболочки твэла:
t_f1max := t_f1(1.922) = 305.236  # °C
t_f2max := t_f2(1.954) = 339.069  # °C
t_f3max := t_f3(1.705) = 309.169  # °C
t_f4max := t_f4(1.727) = 316.75  # °C  # рис. 15
t_f1(z_j) = [273.24; 278.566; 284.304; 290.027; 295.305; 299.743; 303.01; 304.861; 305.157; 303.877; 301.115]
t_f2(z_j) = [275.932; 286.073; 297.118; 308.241; 318.609; 327.446; 334.091; 338.047; 339.017; 336.929; 331.939]
t_f3(z_j) = [274.753; 281.922; 289.143; 295.874; 301.613; 305.93; 308.502; 309.136; 307.785; 304.55; 299.674]
t_f4(z_j) = [275.496; 283.901; 292.424; 300.427; 307.311; 312.562; 315.785; 316.74; 315.355; 311.735; 306.149]
# °C | °C | °C | °C
# Расчет внутренней температуры оболочки твэла:
ΔT_об(z) == q_F(z)/λ_об*δ_об  # - температурный перепад в оболочке твэла
T_об1(z) := T_f1(z) + q_F1(z)/λ_об*δ_об
T_об2(z) := T_f2(z) + q_F2(z)/λ_об*δ_об
T_об3(z) := T_f3(z) + q_F3(z)/λ_об*δ_об
T_об4(z) := T_f4(z) + q_F4(z)/λ_об*δ_об
t_раз(z) := 400  # °C
t_об1(z) := T_об1(z) - 273
t_об3(z) := T_об3(z) - 273
t_об2(z) := T_об2(z) - 273
t_об4(z) := T_об4(z) - 273
# Начиная с температуры t_раз=400°C все циркониевые сплавы претерпевают резкое разупрочнение
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# Максимальные значения внутренней температуры оболочки твэла:
t_об1max := t_об1(1.556) = 327.248  # °C
t_об2max := t_об2(1.617) = 370.931  # °C
t_об3max := t_об3(1.448) = 341.522  # °C
t_об4max := t_об4(1.474) = 349.819  # °C
t_об1(z_j) = [278.193; 290.001; 301.365; 311.437; 319.462; 324.839; 327.167; 326.271; 322.218; 315.312; 306.069]
t_об2(z_j) = [283.362; 303.225; 322.71; 340.356; 354.844; 365.09; 370.327; 370.162; 364.608; 354.081; 339.369]
t_об3(z_j) = [281.504; 297.507; 312.395; 325.055; 334.537; 340.134; 341.426; 338.317; 331.038; 320.135; 306.425]
t_об4(z_j) = [282.469; 299.999; 316.442; 330.567; 341.318; 347.891; 349.792; 346.88; 339.373; 327.833; 313.122]  # рис. 16
# °C | °C | °C | °C
# Расчет наружной температуры топливного сердечника:
# По мере выгорания топлива под оболочку твэла попадают газообразные продукты деления - Kr, Xe, Cs, J. Также, в результате процессов массопереноса происходит радиационное распухание топлива, вследствие чего оно входит в контакт с оболочкой. По результатам многочисленных экспе- риментов, наиболее значимым фактором при определении проводимости контактного слоя является первоначальный зазор. Наружную температуру топлива будем определять с учетом проводимости контактного слоя ([1],c.169).
δ_заз/(d_тв - 2*δ_об) = 0.0128205
# Определяем проводимость газового зазора по графику:
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α_з := 0.27*10^4  # Вт/(м^2*К)
# Температурный перепад в зазоре:
ΔT_нар(z) == q_F(z)/α_з
# рис. 17
T_нар1(z) := T_об1(z) + q_F1(z)/α_з
T_нар2(z) := T_об2(z) + q_F2(z)/α_з
T_нар3(z) := T_об3(z) + q_F3(z)/α_з
T_нар4(z) := T_об4(z) + q_F4(z)/α_з
t_нар1(z) := T_нар1(z) - 273
t_нар2(z) := T_нар2(z) - 273
t_нар3(z) := T_нар3(z) - 273
t_нар4(z) := T_нар4(z) - 273
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# Максимальные значения наружной температуры топливного сердечника:
t_нар1max := t_нар1(1.289) = 619.714  # °C
t_нар2max := t_нар2(1.301) = 807.752  # °C
t_нар3max := t_нар3(1.275) = 741.792  # °C
t_нар4max := t_нар4(1.28) = 762.834  # °C
t_нар1(z_j) = [336.336; 424.224; 501.625; 562.746; 603.013; 619.413; 610.718; 577.58; 522.478; 449.535; 364.211]
t_нар2(z_j) = [370.575; 504.56; 623.099; 717.319; 780.171; 806.951; 795.653; 747.125; 664.997; 555.416; 426.583]
t_нар3(z_j) = [360.747; 480.443; 585.334; 667.57; 720.996; 741.616; 727.885; 680.832; 603.977; 503.072; 385.668]
t_нар4(z_j) = [364.319; 488.952; 598.358; 684.348; 740.489; 762.578; 748.962; 700.661; 621.289; 516.786; 394.972]  # рис. 18
# °C | °C | °C | °C
# Расчет внутренней температуры топлива:
# При определении температурного перепада в топливе разобьем сердечник твэла на 5 участков по радиусу,каждый из которых будет характеризоваться своей теплопроводностью:
d_отв = 0.0012
d_т = 0.0076
r_1 := d_т/2 = 0.0038
r_2 := d_т/2 - (d_т - d_отв)/10 = 0.00316
r_3 := d_т/2 - 2*(d_т - d_отв)/10 = 0.00252  # м
r_4 := d_т/2 - 3*(d_т - d_отв)/10 = 0.00188
r_5 := d_т/2 - 4*(d_т - d_отв)/10 = 0.00124
r_6 := d_отв/2 = 0.0006  # м
# 1-й участок: от r_1 до r_2 | 2-й участок: от r_2 до r_3 | 3-й участок: от r_3 до r_4
# 4-й участок: от r_4 до r_5 | 5-й участок: от r_5 до r_6
# Плотность тепловыделения в топливе:
q_vт(z) := 4*q_v.ср.*K_r(0)*K_z(z)*(210*S_яч1 + 6*S_яч2 + 36*S_яч3 + 6*S_яч1)/(n_тв*π*(d_т^2 - d_отв^2))
# Теплопроводность первого участка будем искать,используя известную внешнюю температу- ру топливного сердечника, теплопроводность последующих участков будем искать, используя полу- ченные значения температуры на границах участков
q_vт(1.25) = 552929478
# 1-й участок:
λ1_т1(z) := 5500/(560 + T_нар1(z)) + 0.942*10^-10*T_нар1(z)^3
λ1_т2(z) := 5500/(560 + T_нар2(z)) + 0.942*10^-10*T_нар2(z)^3
λ1_т3(z) := 5500/(560 + T_нар3(z)) + 0.942*10^-10*T_нар3(z)^3
λ1_т4(z) := 5500/(560 + T_нар4(z)) + 0.942*10^-10*T_нар4(z)^3
# Температурный перепад на участке([6],с.54):
ΔT1_топл1(z) := q_vт(z)*r_1^2/(4*λ1_т1(z))*((r_1/r_2)^2 - 2*ln(r_1/r_2) - 1)
ΔT1_топл2(z) := q_vт(z)*r_1^2/(4*λ1_т2(z))*((r_1/r_2)^2 - 2*ln(r_1/r_2) - 1)
ΔT1_топл3(z) := q_vт(z)*r_1^2/(4*λ1_т3(z))*((r_1/r_2)^2 - 2*ln(r_1/r_2) - 1)
ΔT1_топл4(z) := q_vт(z)*r_1^2/(4*λ1_т4(z))*((r_1/r_2)^2 - 2*ln(r_1/r_2) - 1)
# 2-й участок:
λ2_т1(z) := 5500/(560 + T_нар1(z) + ΔT1_топл1(z)) + 0.942*10^-10*(T_нар1(z) + ΔT1_топл1(z))^3
λ2_т2(z) := 5500/(560 + T_нар2(z) + ΔT1_топл2(z)) + 0.942*10^-10*(T_нар2(z) + ΔT1_топл2(z))^3
λ2_т3(z) := 5500/(560 + T_нар3(z) + ΔT1_топл3(z)) + 0.942*10^-10*(T_нар3(z) + ΔT1_топл3(z))^3
λ2_т4(z) := 5500/(560 + T_нар4(z) + ΔT1_топл4(z)) + 0.942*10^-10*(T_нар4(z) + ΔT1_топл4(z))^3
ΔT2_топл1(z) := q_vт(z)*r_2^2/(4*λ2_т1(z))*((r_2/r_3)^2 - 2*ln(r_2/r_3) - 1)
ΔT2_топл2(z) := q_vт(z)*r_2^2/(4*λ2_т2(z))*((r_2/r_3)^2 - 2*ln(r_2/r_3) - 1)
ΔT2_топл3(z) := q_vт(z)*r_2^2/(4*λ2_т3(z))*((r_2/r_3)^2 - 2*ln(r_2/r_3) - 1)
ΔT2_топл4(z) := q_vт(z)*r_2^2/(4*λ2_т4(z))*((r_2/r_3)^2 - 2*ln(r_2/r_3) - 1)
# Суммарный перепад на рассчитанных участках:
ΔTΣ_топл1(z) := ΔT1_топл1(z) + ΔT2_топл1(z)
ΔTΣ_топл2(z) := ΔT1_топл2(z) + ΔT2_топл2(z)
ΔTΣ_топл3(z) := ΔT1_топл3(z) + ΔT2_топл3(z)
ΔTΣ_топл4(z) := ΔT1_топл4(z) + ΔT2_топл4(z)
# 3-й участок:
λ3_т1(z) := 5500/(560 + T_нар1(z) + ΔTΣ_топл1(z)) + 0.942*10^-10*(T_нар1(z) + ΔTΣ_топл1(z))^3
λ3_т2(z) := 5500/(560 + T_нар2(z) + ΔTΣ_топл2(z)) + 0.942*10^-10*(T_нар2(z) + ΔTΣ_топл2(z))^3
λ3_т3(z) := 5500/(560 + T_нар3(z) + ΔTΣ_топл3(z)) + 0.942*10^-10*(T_нар3(z) + ΔTΣ_топл3(z))^3
λ3_т4(z) := 5500/(560 + T_нар4(z) + ΔTΣ_топл4(z)) + 0.942*10^-10*(T_нар4(z) + ΔTΣ_топл4(z))^3
ΔT3_топл1(z) := q_vт(z)*r_3^2/(4*λ2_т1(z))*((r_3/r_4)^2 - 2*ln(r_3/r_4) - 1)
ΔT3_топл2(z) := q_vт(z)*r_3^2/(4*λ2_т2(z))*((r_3/r_4)^2 - 2*ln(r_3/r_4) - 1)
ΔT3_топл3(z) := q_vт(z)*r_3^2/(4*λ2_т3(z))*((r_3/r_4)^2 - 2*ln(r_3/r_4) - 1)
ΔT3_топл4(z) := q_vт(z)*r_3^2/(4*λ2_т4(z))*((r_3/r_4)^2 - 2*ln(r_3/r_4) - 1)
ΔTΣ_топл1(z) := ΔT1_топл1(z) + ΔT2_топл1(z) + ΔT3_топл1(z)
ΔTΣ_топл2(z) := ΔT1_топл2(z) + ΔT2_топл2(z) + ΔT3_топл2(z)
ΔTΣ_топл3(z) := ΔT1_топл3(z) + ΔT2_топл3(z) + ΔT3_топл3(z)
ΔTΣ_топл4(z) := ΔT1_топл4(z) + ΔT2_топл4(z) + ΔT3_топл4(z)
# 4-й участок:
λ4_т1(z) := 5500/(560 + T_нар1(z) + ΔTΣ_топл1(z)) + 0.942*10^-10*(T_нар1(z) + ΔTΣ_топл1(z))^3
λ4_т2(z) := 5500/(560 + T_нар2(z) + ΔTΣ_топл2(z)) + 0.942*10^-10*(T_нар2(z) + ΔTΣ_топл2(z))^3
λ4_т3(z) := 5500/(560 + T_нар3(z) + ΔTΣ_топл3(z)) + 0.942*10^-10*(T_нар3(z) + ΔTΣ_топл3(z))^3
λ4_т4(z) := 5500/(560 + T_нар4(z) + ΔTΣ_топл4(z)) + 0.942*10^-10*(T_нар4(z) + ΔTΣ_топл4(z))^3
ΔT4_топл1(z) := q_vт(z)*r_4^2/(4*λ2_т1(z))*((r_4/r_5)^2 - 2*ln(r_4/r_5) - 1)
ΔT4_топл2(z) := q_vт(z)*r_4^2/(4*λ2_т2(z))*((r_4/r_5)^2 - 2*ln(r_4/r_5) - 1)
ΔT4_топл3(z) := q_vт(z)*r_4^2/(4*λ2_т3(z))*((r_4/r_5)^2 - 2*ln(r_4/r_5) - 1)
ΔT4_топл4(z) := q_vт(z)*r_4^2/(4*λ2_т4(z))*((r_4/r_5)^2 - 2*ln(r_4/r_5) - 1)
ΔTΣ_топл1(z) := ΔT1_топл1(z) + ΔT2_топл1(z) + ΔT3_топл1(z) + ΔT4_топл1(z)
ΔTΣ_топл2(z) := ΔT1_топл2(z) + ΔT2_топл2(z) + ΔT3_топл2(z) + ΔT4_топл2(z)
ΔTΣ_топл3(z) := ΔT1_топл3(z) + ΔT2_топл3(z) + ΔT3_топл3(z) + ΔT4_топл3(z)
ΔTΣ_топл4(z) := ΔT1_топл4(z) + ΔT2_топл4(z) + ΔT3_топл4(z) + ΔT4_топл4(z)
# 5-й участок:
λ5_т1(z) := 5500/(560 + T_нар1(z) + ΔTΣ_топл1(z)) + 0.942*10^-10*(T_нар1(z) + ΔTΣ_топл1(z))^3
λ5_т2(z) := 5500/(560 + T_нар2(z) + ΔTΣ_топл2(z)) + 0.942*10^-10*(T_нар2(z) + ΔTΣ_топл2(z))^3
λ5_т3(z) := 5500/(560 + T_нар3(z) + ΔTΣ_топл3(z)) + 0.942*10^-10*(T_нар3(z) + ΔTΣ_топл3(z))^3
λ5_т4(z) := 5500/(560 + T_нар4(z) + ΔTΣ_топл4(z)) + 0.942*10^-10*(T_нар4(z) + ΔTΣ_топл4(z))^3
ΔT5_топл1(z) := q_vт(z)*r_5^2/(4*λ2_т1(z))*((r_5/r_6)^2 - 2*ln(r_5/r_6) - 1)
ΔT5_топл2(z) := q_vт(z)*r_5^2/(4*λ2_т2(z))*((r_5/r_6)^2 - 2*ln(r_5/r_6) - 1)
ΔT5_топл3(z) := q_vт(z)*r_5^2/(4*λ2_т3(z))*((r_5/r_6)^2 - 2*ln(r_5/r_6) - 1)
ΔT5_топл4(z) := q_vт(z)*r_5^2/(4*λ2_т4(z))*((r_5/r_6)^2 - 2*ln(r_5/r_6) - 1)
ΔTΣ_топл1(z) := ΔT1_топл1(z) + ΔT2_топл1(z) + ΔT3_топл1(z) + ΔT4_топл1(z) + ΔT5_топл1(z)
ΔTΣ_топл2(z) := ΔT1_топл2(z) + ΔT2_топл2(z) + ΔT3_топл2(z) + ΔT4_топл2(z) + ΔT5_топл2(z)
ΔTΣ_топл3(z) := ΔT1_топл3(z) + ΔT2_топл3(z) + ΔT3_топл3(z) + ΔT4_топл3(z) + ΔT5_топл3(z)
ΔTΣ_топл4(z) := ΔT1_топл4(z) + ΔT2_топл4(z) + ΔT3_топл4(z) + ΔT4_топл4(z) + ΔT5_топл4(z)
# Расчет внутренней температуры топлива:
T_топл1(z) := T_нар1(z) + ΔTΣ_топл1(z)
T_топл2(z) := T_нар2(z) + ΔTΣ_топл2(z)
T_топл3(z) := T_нар3(z) + ΔTΣ_топл3(z)
T_топл4(z) := T_нар4(z) + ΔTΣ_топл4(z)
t_топл1(z) := T_топл1(z) - 273
t_топл2(z) := T_топл2(z) - 273
t_топл3(z) := T_топл3(z) - 273
t_топл4(z) := T_топл4(z) - 273
# Температура ухудшения прочностных свойств UO_2:
t_UO2(z) := 1400  # °C
# Температура плавления урана UO_2:
t_UO2доп = 2800  # °C
# График распределения внутренней температуры топливного сердечника по высоте:
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# Максимальные значения внутренней температуры топливного сердечника:
t_топл1max := t_топл1(1.272) = 916.121  # °C
t_топл2max := t_топл2(1.283) = 1135.79  # °C
t_топл3max := t_топл3(1.266) = 1059.44  # °C
t_топл4max := t_топл4(1.28) = 1083.84  # °C
# рис. 19
t_топл1(z_j) = [383.298; 541.138; 687.053; 806.11; 885.351; 915.92; 894.401; 823.281; 710.585; 568.678; 412.255]
t_топл2(z_j) = [418.865; 628.487; 823.798; 984.121; 1091.83; 1135.2; 1109.69; 1018.18; 870.753; 683.681; 477.022]
t_топл3(z_j) = [408.657; 602.284; 781.377; 927.063; 1023.26; 1059.31; 1031.27; 942.297; 802.329; 626.87; 434.54]
t_топл4(z_j) = [412.367; 611.531; 796.016; 946.334; 1045.9; 1083.72; 1055.72; 965.043; 821.767; 641.763; 444.202]
# °C | °C | °C | °C
# 4.Поверочный теплогидравлический расчет(метод эквивалентной ТВС):
# При расчете методом эквивалентной ТВС реальная сборка заменяется эквивалентной трубой с соответствующими геометрическими характеристиками. Рассчитывать будем самую теплонагру- женную центральную ТВС, расчет ведется по усредненным параметрам.
# Поперечное сечение ТВС по дистанционирующей решетке(твэлы показаны условно):
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# рис. 20
F := 0.144
# 4.1.Расчет геометрических характеристик эквивалентной ТВС:
# За расчетную ячейку принимаем шестигранник с размером под ключ F=144 мм.
S_ТВС := 210*S_яч1 + 6*S_яч2 + 36*S_яч3 + 6*S_яч1 = 0.0174701  # м^2  # - площадь, занимаемая ячейкой
П_об := π*d_тв*n_тв = 3.60215  # м  - обогреваемый периметр ячейки
П_см := π*d_тв*n_тв + π*d_труб + 6*F/sqrt(3) = 4.13931  # м  - смоченный периметр ячейки
S_ж := S_ТВС - π*d_тв^2/4*n_тв - π*d_труб^2/4 = 0.00915826  # м^2  # - площадь проходного сечения ячейки
d_г := 4*S_ж/П_см = 0.00885004  # м  - гидравлический диаметр ячейки
F_топл := π*d_т^2/4*n_тв = 0.00571594  # м^2  # - площадь, занимаемая топливом
# 4.2.Расчет температурных распределений по высоте активной зоны:
# Средняя скорость в максимально нагруженной ТВС:
w_ср := G_ТВСmax/(ρ_H2O*S_ж) = 5.48043
# Распределение плотности теплового потока по длине ТВС:
q_Fср(z) := q_v.ср.*K_r(0)*K_z(z)*S_ТВС/(n_тв*π*d_тв)
# Расчет подогрева теплоносителя по длине ТВС:
ΔT(z) := integral(q_Fср(z), z = 0 .. z)*П_об/(ρ_H2O*w_ср*S_ж*c_pH2O)
T(z) := T_вх + ΔT(z)
t(z) := T(z) - 273
t_s(z) == 326  # °C  # - температура насыщения теплоносителя при давлении 12.26 МПа
t(z_j) = [270.15; 271.435; 273.67; 276.686; 280.259; 284.121; 287.983; 291.556; 294.573; 296.808; 298.093]
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# рис. 21
°C
# Расчет наружной температуры оболочки твэла:
# Число Рейнольдса:
Re := w_ср*d_г/ν_H2O = 389751
# Число Нуссельта вычислим по формуле для продольного обтекания пучка стержней с треугольной решеткой([5],c. 73):
Nu == A*Re^0.8*Pr_H2O^0.4
# где
A := 0.0165 + 0.02*(1 - 0.91*x^-2)*x^0.15 = 0.026818
Nu := A*Re^0.8*Pr_H2O^0.4 = 743.47
# Коэффициент теплоотдачи от ТВЭЛа теплоносителю равен:
α := Nu*λ_H2O/d_г = 48556.3  # Вт/(м^2*К)
# Расчет разности между среднесмешанной температурой теплоносителя и наружной температурой стенки:
T_f(z) := T(z) + q_Fср(z)/α
t_f(z) := T_f(z) - 273
# Температура, при которой обеспеивается высокая коррозионная стойкость Э110:
t_Zr == 352  # °C
# Максимальные значения внешней температуры оболочки твэла:
t_fmax := t_f(1.87) = 306.783  # °C
t_f(z_j) = [273.628; 279.463; 285.648; 291.718; 297.219; 301.74; 304.943; 306.588; 306.551; 304.836; 301.57]
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# °C | рис. 22
# Расчет внутренней температуры оболочки твэла:
ΔT_об(z) := q_Fср(z)/λ_об*δ_об  # - температурный перепад в оболочке твэла
T_об(z) := T_f(z) + ΔT_об(z)
t_об(z) := T_об(z) - 273
# Начиная с температуры t_раз=400°C все циркониевые сплавы претерпевают резкое разупрочнение
# Максимальные значения внутренней температуры оболочки твэла:
t_обmax := t_об(1.532) = 330.956  # °C
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t_об(z_j) = [278.956; 291.763; 303.999; 314.747; 323.204; 328.735; 330.928; 329.618; 324.903; 317.136; 306.898]
# °C | рис.23
# Расчет наружной температуры топливного сердечника:
# Температурный перепад в зазоре:
ΔT_нар(z) := q_Fср(z)/α_з
T_нар(z) := T_об(z) + ΔT_нар(z)
t_нар(z) := T_нар(z) - 273
# Максимальное значение наружной температуры топливного сердечника:
t_нарmax := t_нар(1.286) = 645.876  # °C
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t_об(z_j) = [278.956; 291.763; 303.999; 314.747; 323.204; 328.735; 330.928; 329.618; 324.903; 317.136; 306.898]
# °C | рис.24
# Расчет внутренней температуры топлива:
# При определении температурного перепада в топливе разобьем сердечник твэла на 5 участков по радиусу,каждый из которых будет характеризоваться своей теплопроводностью:
# 1-й участок:
λ1(z) := 5500/(560 + T_нар(z)) + 0.942*10^-10*T_нар(z)^3
# Температурный перепад на участке([6],с.54):
ΔT1(z) := q_vт(z)*r_1^2/(4*λ1(z))*((r_1/r_2)^2 - 2*ln(r_1/r_2) - 1)
# 2-й участок:
λ2(z) := 5500/(560 + T_нар(z) + ΔT1(z)) + 0.942*10^-10*(T_нар(z) + ΔT1(z))^3
ΔT2(z) := q_vт(z)*r_2^2/(4*λ2(z))*((r_2/r_3)^2 - 2*ln(r_2/r_3) - 1)
# Суммарный перепад на рассчитанных участках:
ΔTΣ(z) := ΔT1(z) + ΔT2(z)
# 3-й участок:
λ3(z) := 5500/(560 + T_нар(z) + ΔTΣ(z)) + 0.942*10^-10*(T_нар(z) + ΔTΣ(z))^3
ΔT3(z) := q_vт(z)*r_3^2/(4*λ3(z))*((r_3/r_4)^2 - 2*ln(r_3/r_4) - 1)
ΔTΣ(z) := ΔT1(z) + ΔT2(z) + ΔT3(z)
# 4-й участок:
λ4(z) := 5500/(560 + T_нар(z) + ΔTΣ(z)) + 0.942*10^-10*(T_нар(z) + ΔTΣ(z))^3
ΔT4(z) := q_vт(z)*r_4^2/(4*λ4(z))*((r_4/r_5)^2 - 2*ln(r_4/r_5) - 1)
ΔTΣ(z) := ΔT1(z) + ΔT2(z) + ΔT3(z) + ΔT4(z)
# 5-й участок:
λ5(z) := 5500/(560 + T_нар(z) + ΔTΣ(z)) + 0.942*10^-10*(T_нар(z) + ΔTΣ(z))^3
ΔT5(z) := q_vт(z)*r_5^2/(4*λ5(z))*((r_5/r_6)^2 - 2*ln(r_5/r_6) - 1)
# Суммарный температурный перепад в топливе:
ΔTΣ(z) := ΔT1(z) + ΔT2(z) + ΔT3(z) + ΔT4(z) + ΔT5(z)
# Внутренняя температура топливного сердечника:
T_топл(z) := T_нар(z) + ΔTΣ(z)
t_топл(z) := T_топл(z) - 273
# Температура ухудшения прочностных свойств UO_2:
t_UO2(z) := 1400  # °C
# Максимальное значение внутренней температуры топливного сердечника:
t_топлmax := t_топл(1.27) = 960.614  # °C
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t_топл(z_j) = [389.148; 556.862; 713.442; 841.962; 927.617; 960.429; 936.657; 859.149; 737.037; 584.488; 418.182]
# рис.25
°C
# Выводы по проведенным расчетам методом изолированных ячеек и методом экви- валентной ТВС:
# 1.При расчете обоими методами все температурные распределения удовлетворяют условию T<Tдоп, а именно внешняя температура оболочки твэла меньше температуры протекания развитой пароцирко- ниевой реакции, температура в оболочке меньше температуры резкого ухудшения механических свойств циркониевых сплавов, температура топлива меньше температуры ухудшения прочностных свойств диоксида урана и температуры его плавления.
# 2.Метод эквивалентной ТВС гораздо менее затратный по объему вычислений и дает результат, срав- нительно несильно отличающийся от результата расчета методом изолированных ячеек. Кроме того, метод изолированных ячеек дает более точные результаты только при наличии дистанционирующих решеток без турбулизаторов потока, при расчете ТВС-2М ВВЭР-1000 более точный результат будет давать метод эквивалентной ТВС
ρ(z) := 1/wspVPT(12260000, T_2(z))
T_s := 599.5
r := 1178*10^3
ρ_s := 650.8
# 3.Расчет методом изолирующих ячеек позволил обнаружить подкипание теплоносителя в ячейках близ направляющих каналов, также данный расчет позволил обнаружить наиболее напряженные ячейки с точки зрения кризиса теплообмена, т.е. ячейки с максимальным тепловым потоком и эн- тальпией на выходе.
i_s := 1502*10^3
p := 12.26
ν_s := 1.167*10^-7
i'' := 2680*10^3
Pr_s := 1.067
i_2(z) := wspHPT(12260000, T_2(z))
# 5.Расчет критического теплового потока:
# Критический тепловой поток определяется для самой теплонапряженной ячейки - №2:
# Относительная энтальпия:
x_отн(z) := (i_2(z) - i_s)/(i'' - i_s)
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# рис.26
# Тепловой диаметр твэла:
d_тепл := 4*S_ж2/П_об2
# Критический тепловой поток определим по формуле([5],с.101]) :
q_кр(z) := 10^6*((21.2 - 0.44*p)*(ρ(z)*w_2)^0.34 - 4.4*10^-3*(ρ(z)*w_2)*x_отн(z)*r*10^-6)/(10^-6*r*(0.898 - 0.0373*p)^-1 - 84.5 + H_АЗ/d_тепл)
# Учет входных условий:
F_ф(z) := 1 + 0.3*e^(-0.01*z/d_г2)
# Влияние неравномерности тепловой нагрузки при K_z<1.56 при расчете по вышеприведенной форму- ле несущественно([5],с.101])
q'_кр(z) := F_ф(z)*q_кр(z)
# Коэффициент запаса до кризиса теплообмена:
K_зап(z) := q'_кр(z)/q_F2(z)
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# рис. 27 | рис.28
# Минимальный коэффициент запаса:
K_min := K_зап(1.327) = 1.18868  # >1, => условие отсутсвия кризиса выполняется
# 6.Расчет гидравлического сопротивления АРК:
ρ_вх := 776.9  # кг/м^3
ρ_вых := 720.1  # кг/м^3
# Число Рейнольдса при движении т-ля в межтвэльном пространстве
Re = 389751
# Гидравлические потери складываются из потерь на трение, местных потерь, нивелирных потерь и потерь на ускорение потока. Для определения гидравлического сопротивления кассеты
# АРК,состоящей из ТВС и поглощающей надставки, разобьем ее на участки:
# 1-й участок: хвостовик - опорная решетка
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# 1)Потери на трение.
# Проходя через хвостовик, теплоноситель движется в кольцевом зазоре, образованном корпусом хвостовика и демп- фером:
d_хв1 := 0.09  # м - внешний диаметр трубы демпфера
d_хв2 := 0.136  # м - внутренний диаметр корпуса хвостовика
θ := d_хв1/d_хв2 = 0.661765
S_хв := π*(d_хв2^2 - d_хв1^2)/4 = 0.008165  # м^2  # - площадь проход- ного сечения
L_хв := 0.45  # м - длина хвостовика
ν_хв := wspKINVISPT(12260000, T_вх) = 1.28128e-7
d_г_хв := (d_хв2^2 - d_хв1^2)/(d_хв1 + d_хв2) = 0.046  # м - гидравлический диаметр
w_хв := G_ТВСmax/(ρ_вх*S_хв) = 5.93665  # м/с
Re_хв := w_хв*d_г_хв/ν_хв
# Коэффициент гидравлического сопротивления для движения в трубе([5],с.29):
ξ_0 := (1.82*log(Re_хв) - 1.64)^-2 = 0.0102482
# Коэффициент гидравлического сопротивления для движения в кольцевом зазоре([5],с.30):
# рис. 29
ξ_к := ξ_0*((1 - θ)/(1 + (1 - θ^2)/ln(θ^2)))^0.62*(1 + 0.04*θ) = 0.0109026
Δp_тр_хв := ξ_к*L_хв/d_г_хв*ρ_вх*w_хв^2/2 = 1460.16  # Па
# 2)Местные потери.
# Коэффициент местного сопротивления при входе потока в ТВС([5],с.139):
ξ_вх_хв := 1
# Коэффициент местного сопротивления опорной решетки ([5],с.37):
S_оп := 0.014  # м^2  # -проходная площадь опорной решетки
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ξ_оп := ((1 + 0.707/sqrt(1 - S_оп/S_ТВС))*(S_ТВС/S_оп - 1))^2 = 0.410951
g := 9.81
# рис. 30
Δp_м_хв := (ξ_вх_хв + ξ_оп)*ρ_вх*w_хв^2/2 = 19316.6  # Па
# 3)Нивелирные потери.
Δp_нив_хв := ρ_вх*g*L_хв = 3429.63  # Па
# 4)Потери на ускорение потока.
Δp_уск_хв := 0
# Суммарные гидравлические потери на данном участке:
Δp_Σ_хв := Δp_тр_хв + Δp_м_хв + Δp_нив_хв = 24206.3  # Па
# 2-й участок: опорная решетка - верхняя защитная решетка
# 1)Потери на трение:
# В случае изотермического течения в трубном пучке треугольной формы коэффициент сопротивления трения рассчитывается по формуле([2], с.31)
ξ_o := 0.210*(1 + (x - 1)^0.32)/Re^0.25 = 0.0143595
# Имеет место подогрев теплоносителя, т.е. течение неизотермическое, поправка определяется отношением среднесмешанной температуры и средней температуры стенки
# Средняя температура стенки
T_f.ср := 1/H_АЗ*integral(T_f(z), z = 0 .. H_АЗ)
T_f.ср = 569.71  # К
T_ср := 1/H_АЗ*integral(T(z), z = 0 .. H_АЗ)
T_ср = 557.121  # К
# Коэффициент сопротивления трения при неизотермическом течении([2], c.66)
ξ := ξ_o*(2/(sqrt(T_f.ср/T_ср) + 1))^2
ξ = 0.0141995
Δp_тр_аз := ξ*H_АЗ/d_г*ρ_H2O*w_ср^2/2 = 45196.2  # Па
# 2)Местные потери
# Коэффициент сопротивления дистанционирующей решетки ВВЭР-440([5],с.139):
ξ_д.р. := 0.54
# Количество промежуточных дистанционирующих решёток:
n := 10
# Коэффициент местного сопротивления верхней решетки ([5],с.37):
S_вр := 0.007  # м^2  # -проходная площадь верхней решетки
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ξ_вр := ((1 + 0.707/sqrt(1 - S_вр/S_ТВС))*(S_ТВС/S_вр - 1))^2 = 8.18931
Δp_м_аз := (n*ξ_д.р. + ξ_вр)*ρ_H2O*w_ср^2/2 = 153120  # Па
# 3)Нивелирные потери
Δp_нив_аз := g*integral(ρ_вх*T_вх/T(z), z = 0 .. H_АЗ) = 18580.9  # Па
# 4)Потери на ускорение потока
Δp_уск_аз := (ρ_H2O*w_ср)^2*(1/ρ_вых - 1/ρ_вх) = 1716.68  # Па
# Суммарные гидравлические потери на данном участке:
Δp_Σ_аз := Δp_тр_аз + Δp_м_аз + Δp_нив_аз + Δp_уск_аз = 218614  # Па
# 3-й участок: верхняя решетка - кольцевой зазор между корпусом головки и седлом
# 1)Потери на трение
# Проходя через головку, теплоноситель сначала движется в кольцевом зазоре, образованном корпусом головки и седлом:
d_гол1 := 0.06  # м - внешний диаметр седла
d_гол2 := 0.12  # м - внутренний диаметр корпуса головки
θ := d_гол1/d_гол2 = 0.5
L_гол1 := 0.095  # м - длина кольцевого участка головки
L_гол2 := 0.075  # м - длина цилиндрического участка головки
S_гол1 := π*(d_гол2^2 - d_гол1^2)/4 = 0.0084823  # м^2  # - площадь проходного сечения
S_гол2 := π*d_гол2^2/4 = 0.0113097  # м^2  # - площадь проходного сечения цилиндрической части головки
d_г_гол1 := (d_гол2^2 - d_гол1^2)/(d_гол1 + d_гол2) = 0.06  # м - гидравлический диаметр
ν_гол := wspKINVISPT(12260000, T_вых) = 1.21276e-7
w_гол1 := G_ТВСmax/(ρ_вых*S_гол1) = 6.16533  # м/с
Re_гол1 := w_гол1*d_г_гол1/ν_гол = 3050227
# Коэффициент гидравлического сопротивления для движения в трубе([5],с.29):
ξ_0 := (1.82*log(Re_гол1) - 1.64)^-2 = 0.00968469
# Коэффициент гидравлического сопротивления для движения в кольцевом зазоре([5],с.30):
ξ_к := ξ_0*((1 - θ)/(1 + (1 - θ^2)/ln(θ^2)))^0.62*(1 + 0.04*θ) = 0.0104167
# Потери на трение на участке:
Δp_тр_гол1 := ξ_к*L_гол1/d_г_гол1*ρ_вых*w_гол1^2/2 = 225.724  # Па
# 2)Местные потери
# Коэффициент местного сопротивления в месте перехода от кольцевой части головки к цилиндричес- кой ([5],с.36):
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ξ_1 := 1.1*(1 - (S_гол1/S_гол2)^2) = 0.48125
Δp_м_гол1 := ξ_1*ρ_вых*w_гол1^2/2 = 6586.36  # Па  # рис. 31
# 3)Нивелирные потери:
Δp_нив_гол1 := ρ_вых*g*L_гол1 = 671.097  # Па
# 4)Потери на ускорение потока:
Δp_уск_гол1 := 0
# Суммарные гидравлические потери на данном участке:
Δp_Σ_гол1 := Δp_тр_гол1 + Δp_м_гол1 + Δp_нив_гол1 + Δp_уск_гол1 = 7483.19  # Па
# 4-й участок: цилиндрическая часть головки - нижняя часть надставки
# 1)Потери на трение
L_над1 := 0.031  # м - длина нижней части надставки до нижней защитной решетки
d_г_гол2 := d_гол2 = 0.12  # м
w_гол2 := G_ТВСmax/(ρ_вых*S_гол2) = 4.624  # м/с
Re_гол2 := w_гол2*d_г_гол2/ν_гол = 4575341
# Коэффициент гидравлического сопротивления для движения в трубе([5],с.29):
ξ_0 := (1.82*log(Re_гол2) - 1.64)^-2 = 0.00910152
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# Потери на трение на участке:
Δp_тр_гол2 := ξ_0*(L_гол2 + L_над1)/d_г_гол2*ρ_вых*w_гол2^2/2 = 61.8923  # Па
# 2)Местные потери
# Коэффициент местного сопротивления на нижней решетке ([5],с.37):
S_зр := 0.011  # м^2  # -проходная площадь нижней решетки
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ξ_зр := ((1 + 0.707/sqrt(1 - S_зр/S_гол2))*(S_гол2/S_зр - 1))^2 = 0.0220381
Δp_м_гол2 := ξ_зр*ρ_вых*w_гол2^2/2 = 169.657  # Па
# 3)Нивелирные потери
Δp_нив_гол2 := ρ_вых*g*(L_гол2 + L_над1) = 748.803  # Па
# 4)Потери на ускорение потока:
Δp_уск_гол2 := 0
# Суммарные гидравлические потери на данном участке:
Δp_Σ_гол2 := Δp_тр_гол2 + Δp_м_гол2 + Δp_нив_гол2 + Δp_уск_гол2 = 980.353  # Па
# 5-й участок: нижняя решетка - седло
d_над2 := 0.1  # м - внутренний диаметр надставки
L_над2 := 2.3  # м - длина участка
# рис. 32
S_над2 := π*d_над2^2/4 = 0.00785398  # м^2  # - площадь проходного сечения
w_над2 := G_ТВСmax/(ρ_вых*S_над2) = 6.65855  # м/с
Re_над2 := w_над2*d_над2/ν_гол = 5490409
# Коэффициент гидравлического сопротивления для движения в трубе([5],с.29):
ξ_0 := (1.82*log(Re_над2) - 1.64)^-2 = 0.00885633
# Потери на трение на участке:
Δp_тр_над2 := ξ_0*L_над2/d_над2*ρ_вых*w_над2^2/2 = 3251.65  # Па
# 2)Местные потери
# Коэффициент местного сопротивления на входе в седло ([5],с.36):
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S_седл := 0.0014  # м^2  # - проходная площадь седла
ξ_1 := 0.5*(1 - S_седл/S_над2) = 0.410873  # рис. 33
# Коэффициент местного сопротивления в диффузоре([7],с.159):
ξ_д == ξ_тр + ξ_расш
# - коэффициент сопротивления в диффузоре складывается из коэффициента потерь на трение и коэффициента потерь, связанных с расширением диффу- зора
n_1 := 2.59  # - степень расширения в диффузоре
λ := 0.45  # - параметр трения, зависящий от числа Рейнольдса и шероховатости([7],рис.2-2)
α_д := 1.34  # рад - угол расширения диффузора
ξ_тр := λ/(8*sin(α_д/2))*(1 - 1/n_1)^2 = 0.0341378
ξ_расш := 3.2*tan(α_д/2)*nthroot(tan(α_д/2), 4)*(1 - 1/n_1)^2 = 0.901416
ξ_д := ξ_тр + ξ_расш = 0.935554
Δp_м_над2 := (ξ_1 + ξ_д)*ρ_вых*w_над2^2/2 = 21493.4  # Па
# 3)Нивелирные потери
Δp_нив_над2 := ρ_вых*g*L_над2 = 16247.6  # Па
# 4)Потери на ускорение потока:
Δp_уск_над2 := 0
# Суммарные гидравлические потери на данном участке:
Δp_Σ_над2 := Δp_тр_над2 + Δp_м_над2 + Δp_нив_над2 + Δp_уск_над2 = 40992.7  # Па
# Диффузор - выход из надставки
d_над3 := 0.12  # м - внутренний диаметр верхней части надставки
L_над3 := 0.12  # м - длина участка
S_над3 := π*d_над3^2/4 = 0.0113097  # м^2  # - площадь проходного сечения
w_над3 := G_ТВСmax/(ρ_вых*S_над3) = 4.624  # м/с
Re_над3 := w_над3*d_над3/ν_гол = 4575341
# Коэффициент гидравлического сопротивления для движения в трубе([5],с.29):
ξ_0 := (1.82*log(Re_над3) - 1.64)^-2 = 0.00910152
# Потери на трение на участке:
Δp_тр_над3 := ξ_0*L_над3/d_над3*ρ_вых*w_над3^2/2 = 70.0667  # Па
# 2)Местные потери
# Коэффициент местного сопротивления на выходе из надставки ([5],с.36):
ξ_вых := 1.1
Δp_м_над3 := ξ_вых*ρ_вых*w_над3^2/2 = 8468.18  # Па
# 3)Нивелирные потери
Δp_нив_над3 := ρ_вых*g*L_над3 = 847.702  # Па
# 4)Потери на ускорение потока:
Δp_уск_над3 := 0
# Суммарные гидравлические потери на данном участке:
Δp_Σ_над3 := Δp_тр_над3 + Δp_м_над3 + Δp_нив_над3 + Δp_уск_над3 = 9385.95  # Па
# Суммарные потери давления на АРК ВВЭР-440
Δp_Σ := Δp_Σ_хв + Δp_Σ_аз + Δp_Σ_гол1 + Δp_Σ_гол2 + Δp_Σ_над2 + Δp_Σ_над3 = 301662  # Па
# Затраты мощности, необходимой для прокачки теплоносителя через кассету:
η := 0.76  # - КПД насоса
N_з := G_ТВСmax*Δp_Σ/(ρ_вх*η) = 19240  # Вт
# 7.Прочностной расчет твэла ТВС ВВЭР-440:
# Исходные данные(на основе проведенного теплогидравлического расчета)
# Давление гелия внутри твэла :
p_He := 2*10^6  # Па
# Максимальная температура оболочки :
t_об.max := 371  # °C
T_об.max := t_об.max + 273 = 644  # К
# Температура гелия в зазоре:
t_He := 590  # °C
T_He := t_He + 273 = 863  # К
# Средняя температура топливного сердечника:
t_топл.ср := 972  # °C
T_топл.ср := t_топл.ср + 273 = 1245  # К
# Максимальная температура наружной стенки топливного сердечника:
t_топл.нар := 808  # °C
# Максимальный перепад температуры в топливе:
Δt_топл.max := 328  # °C
# Среднее энерговыделение в топливе:
q_t := 0.395  # Вт/мм^3
# Диаметр отверстия в топливной таблетке :
d_0 := 1.2  # мм
# Диаметр твэла :
d := 9.1  # мм
# Толщина оболочки твэла :
δ_об := 0.65  # мм
# Диаметр топливной таблетки :
d_т := 7.6  # мм
# Плотность топливной таблетки(в долях от теоретической) :
ρ_табл := 0.95
# Высота "активной" части твэла при 20 °C :
h_з := 2500  # мм
# Высота газосборника 20 °C :
h_г := 74  # мм
# Плотность топливной таблетки(в долях от теоретической) :
ρ_табл := 0.95
# Максимальная глубина выгорания:
B := 0.05
